*Heading
** Job name: SendIt Model name: Model-1
** Generated by: Abaqus/CAE Student Edition 2018
*Preprint, echo=NO, model=NO, history=NO, contact=NO
**
** PARTS
**
*Part, name=Plate
*Node
      1,         105.,         120.,           0.
      2,   103.535538,   123.535538,           0.
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*Element, type=C3D8R
  1, 126, 101,   1,  95, 599, 574, 474, 568
  2,   2,  90, 112,  89, 475, 563, 585, 562
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*Nset, nset=_PickedSet6, internal, generate
   1,  946,    1
*Elset, elset=_PickedSet6, internal, generate
   1,  440,    1
** Section: Main
*Solid Section, elset=_PickedSet6, material=Acrylic
,
*End Part
**
**
** ASSEMBLY
**
*Assembly, name=Assembly
**
*Instance, name=Plate-1, part=Plate
*End Instance
**
*Nset, nset=StaticPins, instance=Plate-1
   9,  10,  11,  12,  13,  14
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*Elset, elset=StaticPins, instance=Plate-1
   5,  15,  17,  18,  28,  29
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*Nset, nset=_PickedSet5, internal, instance=Plate-1
   1,   2,   3,   4,   5,   6,   7,   8, 474, 475, 476, 477, 478, 479, 480, 481
*Elset, elset=_PickedSet5, internal, instance=Plate-1
  3,  8, 23, 24, 51, 67, 72, 85
*End Assembly
**
** MATERIALS
**
*Material, name=Acrylic
*Density
1190.,
*Elastic
 2.8e+09, 0.35
*Plastic
 6.9e+07,  0.
   7e+07, 0.1
** ----------------------------------------------------------------
**
** STEP: StepUno
**
*Step, name=StepUno, nlgeom=NO
*Static
1., 1., 1e-05, 1.
**
** BOUNDARY CONDITIONS
**
** Name: BC-2 Type: Displacement/Rotation
*Boundary
_PickedSet5, 2, 2, 7.
** Name: PinsABC Type: Displacement/Rotation
*Boundary
StaticPins, 1, 1
StaticPins, 2, 2
StaticPins, 3, 3
StaticPins, 4, 4
StaticPins, 5, 5
**
** OUTPUT REQUESTS
**
*Restart, write, frequency=0
**
** FIELD OUTPUT: F-Output-1
**
*Output, field, variable=PRESELECT
**
** HISTORY OUTPUT: H-Output-1
**
*Output, history, variable=PRESELECT
*End Step
